# OpenSim document version 20001
Model Lumbar_C_4:
  length_units: meters
  force_units: N
  gravity: 0 -9.80665 0
  defaults: Thelen2003Muscle default: max_isometric_force=546 optimal_fiber_length=0.0535 tendon_slack_length=0.078
      pennation_angle=0 activation_time_constant=0.01 deactivation_time_constant=0.04 Vmax=10 Vmax0=5
      FmaxTendonStrain=0.033 FmaxMuscleStrain=0.6 KshapeActive=0.45 KshapePassive=4 damping=0.05 Af=0.3 Flen=1.4
  ForceSet:
    Thelen2003Muscle rect_abd_r: max_isometric_force=263 optimal_fiber_length=0.2238 tendon_slack_length=0.017
        pennation_angle=0
      PathPoint P1: pelvis (-0.04158234000000000200 -0.0.09647999999999999600 -0.01069000000000000000)
      PathPoint P2: torso (0.08806 0.22257 -0.03445)
    Thelen2003Muscle rect_abd_l: max_isometric_force=263 optimal_fiber_length=0.2238 tendon_slack_length=0.017
        pennation_angle=0
      PathPoint P1: pelvis (-0.04158234000000000200 -0.0.09647999999999999600 0.01069000000000000000)
      PathPoint P2: torso (0.08806 0.22257 0.03445)
    Thelen2003Muscle ercspn_r: max_isometric_force=1293 optimal_fiber_length=0.084 tendon_slack_length=0.2176756
        pennation_angle=0.2286
      PathPoint P1: pelvis (-0.14 0.01224 0.02245508)
      PathPoint P2: torso (-0.07843 0.2303417 0.05665)
    Thelen2003Muscle ercspn_l: max_isometric_force=1293 optimal_fiber_length=0.084 tendon_slack_length=0.2176756
        pennation_angle=0.2286
      PathPoint P1: pelvis (-0.14 0.01224 -0.02245508)
      PathPoint P2: torso (-0.07843 0.2303417 -0.05665)
  BodySet:
    Body ground: mass=0 mass_center=(0 0 0) inertia_xx=0 inertia_yy=0 inertia_zz=0
    Body pelvis: mass=0 mass_center=(0 0 0) inertia_xx=0 inertia_yy=0 inertia_zz=0 meshes=(pelvis_rv.vtp pelvis_lv.vtp)
      WeldJoint gndpelvis: parent_body=ground location_in_parent=(0 0.979 0) location=(0 0 0)
    Body sacrum: mass=7.486 mass_center=(0 0 0) inertia_xx=0.075 inertia_yy=0.08 inertia_zz=0.03 meshes=sacrum.vtp
      WeldJoint gndsacrum: parent_body=ground location_in_parent=(0 0.93 0) location=(0 0 0)
    Body lumbar5: mass=1.824 mass_center=(0.053744 0.02 0) inertia_xx=0.01219 inertia_yy=0.01765 inertia_zz=0.00546
        meshes=lumbar5.vtp
      CustomJoint L5_S1_IVDjnt: parent_body=sacrum location_in_parent=(-0.098 0.071 0) location=(0 0 0)
        Coordinate flex_extension: motion_type=rotational default_value=0 initial_value=0 range=(-1.22173 0.4537856)
            clamped=false
        Coordinate lat_bending: motion_type=rotational default_value=0 initial_value=0 range=(-0.4363323 0.4363323)
            clamped=false
        Coordinate axial_rotation: motion_type=rotational default_value=0 initial_value=0 range=(-0.7853982 0.7853982)
            clamped=false
        SpatialTransform: axes_held_at_zero=(translation1 translation2 translation3)
          TransformAxis rotation1: coordinates=flex_extension axis=(0 0 1) LinearFunction(coefficients=0.125 0)
          TransformAxis rotation2: coordinates=lat_bending axis=(1 0 0) LinearFunction(coefficients=0.1356 0)
          TransformAxis rotation3: coordinates=axial_rotation axis=(0 1 0) LinearFunction(coefficients=0.03033 0)
    Body lumbar4: mass=1.799 mass_center=(0.0170296 0.018 0) inertia_xx=0.01123 inertia_yy=0.01643 inertia_zz=0.0052
        meshes=lumbar4.vtp
      CustomJoint L4_L5_IVDjnt: parent_body=lumbar5 location_in_parent=(0.01 0.0296 0) location=(0.001 -0.0025 0)
        Coordinate L4_L5_FE: motion_type=rotational default_value=0.06534513 initial_value=0.06534513
            range=(-99999.9 99999.9) clamped=false
        Coordinate L4_L5_LB: motion_type=rotational default_value=0 initial_value=0 range=(-99999.9 99999.9)
            clamped=false
        Coordinate L4_L5_AR: motion_type=rotational default_value=0 initial_value=0 range=(-99999.9 99999.9)
            clamped=false
        SpatialTransform: axes_held_at_zero=(translation1 translation2 translation3)
          TransformAxis rotation1: coordinates=L4_L5_FE axis=(0 0 1) LinearFunction(coefficients=1 0)
          TransformAxis rotation2: coordinates=L4_L5_LB axis=(1 0 0) LinearFunction(coefficients=1 0)
          TransformAxis rotation3: coordinates=L4_L5_AR axis=(0 1 0) LinearFunction(coefficients=1 0)
    Body lumbar3: mass=1.67 mass_center=(0.0136848 0.018 0) inertia_xx=0.01066 inertia_yy=0.01608 inertia_zz=0.00551
        meshes=lumbar3.vtp
      CustomJoint L3_L4_IVDjnt: parent_body=lumbar4 location_in_parent=(0 0.032 0) location=(-0.0006 -0.0012 0)
        Coordinate L3_L4_FE: motion_type=rotational default_value=0.09291054 initial_value=0.09291054
            range=(-99999.9 99999.9) clamped=false
        Coordinate L3_L4_LB: motion_type=rotational default_value=0 initial_value=0 range=(-99999.9 99999.9)
            clamped=false
        Coordinate L3_L4_AR: motion_type=rotational default_value=0 initial_value=0 range=(-99999.9 99999.9)
            clamped=false
        SpatialTransform: axes_held_at_zero=(translation1 translation2 translation3)
          TransformAxis rotation1: coordinates=L3_L4_FE axis=(0 0 1) LinearFunction(coefficients=1 0)
          TransformAxis rotation2: coordinates=L3_L4_LB axis=(1 0 0) LinearFunction(coefficients=1 0)
          TransformAxis rotation3: coordinates=L3_L4_AR axis=(0 1 0) LinearFunction(coefficients=1 0)
    Body lumbar2: mass=1.689 mass_center=(0.0245272 0.018 0) inertia_xx=0.01091 inertia_yy=0.01682 inertia_zz=0.00591
        meshes=lumbar2.vtp
      CustomJoint L2_L3_IVDjnt: parent_body=lumbar3 location_in_parent=(-0.008 0.0312 0) location=(-0.0013 -0.0039 0)
        Coordinate L2_L3_FE: motion_type=rotational default_value=0.1119118 initial_value=0.1119118
            range=(-99999.9 99999.9) clamped=false
        Coordinate L2_L3_LB: motion_type=rotational default_value=0 initial_value=0 range=(-99999.9 99999.9)
            clamped=false
        Coordinate L2_L3_AR: motion_type=rotational default_value=0 initial_value=0 range=(-99999.9 99999.9)
            clamped=false
        SpatialTransform: axes_held_at_zero=(translation1 translation2 translation3)
          TransformAxis rotation1: coordinates=L2_L3_FE axis=(0 0 1) LinearFunction(coefficients=1 0)
          TransformAxis rotation2: coordinates=L2_L3_LB axis=(1 0 0) LinearFunction(coefficients=1 0)
          TransformAxis rotation3: coordinates=L2_L3_AR axis=(0 1 0) LinearFunction(coefficients=1 0)
    Body lumbar1: mass=1.677 mass_center=(0.039 0.017 0) inertia_xx=0.01113 inertia_yy=0.01753 inertia_zz=0.0064
        meshes=lumbar1.vtp
      CustomJoint L1_L2_IVDjnt: parent_body=lumbar2 location_in_parent=(-0.01 0.025 0) location=(0.0014 -0.0038 0)
        Coordinate L1_L2_FE: motion_type=rotational default_value=0.1334955 initial_value=0.1334955
            range=(-99999.9 99999.9) clamped=false
        Coordinate L1_L2_LB: motion_type=rotational default_value=0 initial_value=0 range=(-99999.9 99999.9)
            clamped=false
        Coordinate L1_L2_AR: motion_type=rotational default_value=0 initial_value=0 range=(-99999.9 99999.9)
            clamped=false
        SpatialTransform: axes_held_at_zero=(translation1 translation2 translation3)
          TransformAxis rotation1: coordinates=L1_L2_FE axis=(0 0 1) LinearFunction(coefficients=1 0)
          TransformAxis rotation2: coordinates=L1_L2_LB axis=(1 0 0) LinearFunction(coefficients=1 0)
          TransformAxis rotation3: coordinates=L1_L2_AR axis=(0 1 0) LinearFunction(coefficients=1 0)
    Body torso: mass=18.619 mass_center=(0.0046 0.246 0) inertia_xx=0.165 inertia_yy=0.15 inertia_zz=0.125
        meshes=(thoracic12_s.vtp thoracic11_s.vtp thoracic10_s.vtp thoracic9_s.vtp thoracic8_s.vtp thoracic7_s.vtp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)
      WeldJoint torsojnt: parent_body=lumbar1 location_in_parent=(0.0025 -0.089 0) location=(0 0 0)
      WrapEllipsoid Abdomen: translation=(0.08 0.02 0) quadrant=x dimensions=(0.01 0.08 0.05)
    ObjectGroup Lumbar_Vertebrae: members=(lumbar1 lumbar2 lumbar3 lumbar4 lumbar5)
  ConstraintSet:
    CoordinateCouplerConstraint L4_L5_FE_con: independent_coordinate_names=flex_extension
        dependent_coordinate_name=L4_L5_FE scale_factor=1
        coupled_coordinates_function=LinearFunction(coefficients=0.144 0)
    CoordinateCouplerConstraint L4_L5_AR_con: independent_coordinate_names=axial_rotation
        dependent_coordinate_name=L4_L5_AR scale_factor=1
        coupled_coordinates_function=LinearFunction(coefficients=0.04222223 0)
    CoordinateCouplerConstraint L4_L5_LB_con: independent_coordinate_names=lat_bending
        dependent_coordinate_name=L4_L5_LB scale_factor=1
        coupled_coordinates_function=LinearFunction(coefficients=0.1810862 0)
    CoordinateCouplerConstraint L3_L4_FE_con: independent_coordinate_names=flex_extension
        dependent_coordinate_name=L3_L4_FE scale_factor=1
        coupled_coordinates_function=LinearFunction(coefficients=0.2047454 0)
    CoordinateCouplerConstraint L3_L4_AR_con: independent_coordinate_names=axial_rotation
        dependent_coordinate_name=L3_L4_AR scale_factor=1
        coupled_coordinates_function=LinearFunction(coefficients=0.04222393 0)
    CoordinateCouplerConstraint L3_L4_LB_con: independent_coordinate_names=lat_bending
        dependent_coordinate_name=L3_L4_LB scale_factor=1
        coupled_coordinates_function=LinearFunction(coefficients=0.245332 0)
    CoordinateCouplerConstraint L2_L3_FE_con: independent_coordinate_names=flex_extension
        dependent_coordinate_name=L2_L3_FE scale_factor=1
        coupled_coordinates_function=LinearFunction(coefficients=0.2466182 0)
    CoordinateCouplerConstraint L2_L3_AR_con: independent_coordinate_names=axial_rotation
        dependent_coordinate_name=L2_L3_AR scale_factor=1
        coupled_coordinates_function=LinearFunction(coefficients=0.03333333 0)
    CoordinateCouplerConstraint L2_L3_LB_con: independent_coordinate_names=lat_bending
        dependent_coordinate_name=L2_L3_LB scale_factor=1
        coupled_coordinates_function=LinearFunction(coefficients=0.2501285 0)
    CoordinateCouplerConstraint L1_L2_FE_con: independent_coordinate_names=flex_extension
        dependent_coordinate_name=L1_L2_FE scale_factor=1
        coupled_coordinates_function=LinearFunction(coefficients=0.2941818 0)
    CoordinateCouplerConstraint L1_L2_AR_con: independent_coordinate_names=axial_rotation
        dependent_coordinate_name=L1_L2_AR scale_factor=1
        coupled_coordinates_function=LinearFunction(coefficients=0.02888889 0)
    CoordinateCouplerConstraint L1_L2_LB_con: independent_coordinate_names=lat_bending
        dependent_coordinate_name=L1_L2_LB scale_factor=1
        coupled_coordinates_function=LinearFunction(coefficients=0.188 0)
